*Heading
** V10 v10_rough_center: ROUGH x2=42.5mm mu=0.45
** Model hash: bc028982b5a0e8bf
** V9 audit: 61-98 kN = EXTRACTION ARTIFACT confirmed
** V10: Whole-frame rotation + double-center coupling support
** Belt: 468 nodes, 408 S4R
** Date: 2026-07-23T15:15:45.956362
*Preprint, echo=NO, model=NO, history=NO, contact=NO
** MATERIALS
*Material, name=AISI_304
*Density
 7.9e-9,
*Elastic
 200000., 0.30
*Plastic
 230., 0
 270., 0.002
 320., 0.01
 390., 0.03
 470., 0.07
 550., 0.15
 630., 0.25
 700., 0.4
*Material, name=BeltMat
*Density
 1.5e-9,
*Elastic
 4000.0, 0.30
** WORKPIECE: V9 validated cylindrical O-grid (D=26mm L=160mm)
*Include, input=includes/wp_cylinder_v9.inc
** BELT: Two-pulley flexible S4R
*Part, name=BI
*Node
1,-15.000000,-3.014493,-31.857697
2,-11.250000,-3.014493,-31.857697
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*Element, type=S4R
1,1,2,11,10
2,2,3,12,11
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*Elset, elset=BI_ALL, generate
1,408,1
*Nset, nset=BI_ALL, generate
1,468,1
*Surface, name=BELT_OUTER, type=ELEMENT
1,SPOS
2,SPOS
3,SPOS
4,SPOS
5,SPOS
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408,SPOS
*Surface, name=BELT_INNER, type=ELEMENT
1,SNEG
2,SNEG
3,SNEG
4,SNEG
5,SNEG
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408,SNEG
*Shell Section, elset=BI_ALL, material=BeltMat
1.0,
*End Part
** BIG PULLEY: Rigid R=31.5mm
*Part, name=BP
*Node
1, 0.0, 0.000000, 0.000000
*Nset, nset=BP_REF
1,
*Surface, type=REVOLUTION, name=BP_SURF
START, 31.500, -17.000
LINE,  31.500,  17.000
*Rigid Body, ref node=BP_REF, analytical surface=BP_SURF
*End Part
** SMALL PULLEY: Rigid R=12.0mm
*Part, name=SP
*Node
1, 0.0, 0.000000, 207.000000
*Nset, nset=SP_REF
1,
*Surface, type=REVOLUTION, name=SP_SURF
START, 12.000, -17.000
LINE,  12.000,  17.000
*Rigid Body, ref node=SP_REF, analytical surface=SP_SURF
*End Part
** ASSEMBLY
*Assembly, name=Assembly
*Instance, name=WI, part=WP
*End Instance
*Instance, name=BI, part=BI
*End Instance
*Instance, name=BPR, part=BP
*End Instance
*Instance, name=SPR, part=SP
*End Instance
*Node
9999991, 0.0, 0.0, -80.000000
9999992, 0.0, 0.0, 80.000000
9999993, 0.0, 0.0, 0.0
*Nset, nset=WP_LEFT_RP
9999991,
*Nset, nset=WP_RIGHT_RP
9999992,
*Nset, nset=FRAME_RP
9999993,
*Surface, type=NODE, name=WP_LEFT_NODES
WI.EndLeft
*Surface, type=NODE, name=WP_RIGHT_NODES
WI.EndRight
*Surface, type=NODE, name=WP_GRIND_SURF_NODES
WI.OuterSurface
*Surface, type=ELEMENT, name=WP_ALL_SURF
WI.AllElems,
*Coupling, constraint name=WP_LEFT_CPLG, ref node=WP_LEFT_RP, surface=WP_LEFT_NODES
*Distributing
*Coupling, constraint name=WP_RIGHT_CPLG, ref node=WP_RIGHT_RP, surface=WP_RIGHT_NODES
*Distributing
*Kinematic Coupling, ref node=FRAME_RP
BPR.BP_REF, 1, 6
*Kinematic Coupling, ref node=SPR.SP_REF
FRAME_RP, 1, 6
*End Assembly
*Surface Interaction, name=INT_BW
*Friction
0.45,
*Surface Behavior, pressure-overclosure=HARD
*Surface Interaction, name=INT_PULLEY
*Friction
0.0,
*Surface Behavior, pressure-overclosure=HARD
*Contact
*Contact Inclusions
WI.WP_ALL_SURF, BI.BELT_OUTER
BI.BELT_INNER, BPR.BP_SURF
BI.BELT_INNER, SPR.SP_SURF
*Contact Property Assignment
WI.WP_ALL_SURF, BI.BELT_OUTER,  INT_BW
BI.BELT_INNER, BPR.BP_SURF,   INT_PULLEY
BI.BELT_INNER, SPR.SP_SURF,   INT_PULLEY
*Initial Conditions, type=STRESS
BI.BI_ALL, 3.0000
*Step, name=Pretension, nlgeom=YES, inc=200
*Static
0.01, 1.0, 1e-08, 1.0
*Boundary
FRAME_RP, 1, 6, 0.0
WP_LEFT_RP, 1, 3, 0.0
WP_LEFT_RP, 4, 6, 0.0
WP_RIGHT_RP, 1, 2, 0.0
WP_RIGHT_RP, 4, 6, 0.0
*Output, field
*Node Output
U, RF
*Element Output
S, PEEQ
*Contact Output
CSTATUS, CPRESS, CNORMF, CSHEARF, COPEN
*Output, history
**
** STEP 2: FramePose (theta=11.848deg)
**
*Step, name=FramePose, nlgeom=YES, inc=200
*Static
0.01, 1.0, 1e-08, 1.0
*Boundary, op=NEW
FRAME_RP, 1, 3, 0.0
FRAME_RP, 5, 6, 0.0
FRAME_RP, 4, 4, 0.20678454
WP_LEFT_RP, 1, 3, 0.0
WP_LEFT_RP, 4, 6, 0.0
WP_RIGHT_RP, 1, 2, 0.0
WP_RIGHT_RP, 4, 6, 0.0
*Output, field
*Node Output
U, RF
*Element Output
S, PEEQ
*Contact Output
CSTATUS, CPRESS, CNORMF, CSHEARF, COPEN
*Output, history
**
** STEP 3: ContactApproach with stabilization
**
*Step, name=ContactApproach, nlgeom=YES, inc=500, unsymm=YES
*Static, stabilize
0.01, 1.0, 1e-06, 1.0
*Boundary, op=NEW
FRAME_RP, 1, 3, 0.0
FRAME_RP, 5, 6, 0.0
WP_LEFT_RP, 1, 3, 0.0
WP_LEFT_RP, 4, 6, 0.0
WP_RIGHT_RP, 1, 2, 0.0
WP_RIGHT_RP, 4, 6, 0.0
*Contact Controls, stabilize
*Contact Controls, automatic tolerances
*Output, field
*Node Output
U, RF
*Element Output
S, PEEQ
*Contact Output
CSTATUS, CPRESS, CNORMF, CSHEARF, COPEN
*Output, history
*Energy Output
ALLSE, ALLSD, ALLWK
*End Step
**
** STEP 4: FrictionRamp
**
*Step, name=FrictionRamp, nlgeom=YES, inc=200, unsymm=YES
*Static
0.01, 1.0, 1e-06, 1.0
*Boundary, op=NEW
FRAME_RP, 1, 3, 0.0
FRAME_RP, 5, 6, 0.0
WP_LEFT_RP, 1, 3, 0.0
WP_LEFT_RP, 4, 6, 0.0
WP_RIGHT_RP, 1, 2, 0.0
WP_RIGHT_RP, 4, 6, 0.0
*Output, field
*Node Output
U, RF
*Element Output
S, PEEQ
*Contact Output
CSTATUS, CPRESS, CNORMF, CSHEARF, COPEN
*Output, history
**
** STEP 5: Equilibrium (steady state)
**
*Step, name=Equilibrium, nlgeom=YES, inc=500, unsymm=YES
*Static
0.01, 1.0, 1e-06, 1.0
*Boundary, op=NEW
FRAME_RP, 1, 3, 0.0
FRAME_RP, 5, 6, 0.0
WP_LEFT_RP, 1, 3, 0.0
WP_LEFT_RP, 4, 6, 0.0
WP_RIGHT_RP, 1, 2, 0.0
WP_RIGHT_RP, 4, 6, 0.0
*Output, field
*Node Output
U, RF
*Element Output
S, PEEQ
*Contact Output
CSTATUS, CPRESS, CNORMF, CSHEARF, COPEN
*Output, history
