*Heading
** V11 v11_rough_center: ROUGH x2=42.5mm mu=0.45
** Model hash: b8be295e986b6354
** V9 audit: 61-98 kN = EXTRACTION ARTIFACT confirmed
** V10 root cause: missing *End Step + misplaced *Material
** V11: Structured section-based generator with scope validation
** Belt: 468 nodes, 408 S4R
** Backing modulus: 4000.0 MPa
** Date: 2026-07-23T18:02:36.795765
*Preprint, echo=NO, model=NO, history=NO, contact=NO
** MATERIAL: AISI 304 (defined at input file level, before Parts)
*Material, name=AISI_304
*Density
 7.9e-9,
*Elastic
 200000., 0.30
*Plastic
 230., 0
 270., 0.002
 320., 0.01
 390., 0.03
 470., 0.07
 550., 0.15
 630., 0.25
 700., 0.4
*Material, name=BeltMat
*Density
 1.5e-9,
*Elastic
 4000.0, 0.30
** WORKPIECE: Include V9 validated mesh (already contains *Part WP + *Solid Section)
*Include, input=includes/wp_cylinder_v9.inc
** BELT: Two-pulley flexible S4R (part=BI)
*Part, name=BI
*Node
1,-15.000000,-3.014493,-31.857697
2,-11.250000,-3.014493,-31.857697
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*Element, type=S4R
1,1,2,11,10
2,2,3,12,11
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*Elset, elset=BI_ALL, generate
1,408,1
*Nset, nset=BI_ALL, generate
1,468,1
*Surface, name=BELT_OUTER, type=ELEMENT
1,SPOS
2,SPOS
3,SPOS
4,SPOS
5,SPOS
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408,SPOS
*Surface, name=BELT_INNER, type=ELEMENT
1,SNEG
2,SNEG
3,SNEG
4,SNEG
5,SNEG
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408,SNEG
*Shell Section, elset=BI_ALL, material=BeltMat
1.0,
*End Part
** BIG PULLEY: Rigid R=31.5mm (part=BP)
*Part, name=BP
*Node
1, 0.0, 0.0, 0.000000
*Nset, nset=BP_REF
1,
*Surface, type=REVOLUTION, name=BP_SURF
START, 31.500, -17.000
LINE,  31.500,  17.000
*Rigid Body, ref node=BP_REF, analytical surface=BP_SURF
*End Part
** SMALL PULLEY: Rigid R=12.0mm (part=SP)
*Part, name=SP
*Node
1, 0.0, 0.0, 207.000000
*Nset, nset=SP_REF
1,
*Surface, type=REVOLUTION, name=SP_SURF
START, 12.000, -17.000
LINE,  12.000,  17.000
*Rigid Body, ref node=SP_REF, analytical surface=SP_SURF
*End Part
** ASSEMBLY
*Assembly, name=Assembly
*Instance, name=WI, part=WP
*Elset, elset=WI_AllElems2, generate
1, 27648, 1
*Solid Section, elset=WI_AllElems2, material=AISI_304
*End Instance
*Instance, name=BI, part=BI
*End Instance
*Instance, name=BPR, part=BP
*End Instance
*Instance, name=SPR, part=SP
*End Instance
*Node
9999991, 0.0, 0.0, -80.000000
9999992, 0.0, 0.0, 80.000000
9999993, 0.0, 0.0, 0.0
*Nset, nset=WP_LEFT_RP
9999991,
*Nset, nset=WP_RIGHT_RP
9999992,
*Nset, nset=FRAME_RP
9999993,
*Surface, type=NODE, name=WP_LEFT_NODES
WI.EndLeft
*Surface, type=NODE, name=WP_RIGHT_NODES
WI.EndRight
*Surface, type=NODE, name=WP_GRIND_SURF_NODES
WI.OuterSurface
*Kinematic Coupling, ref node=WP_LEFT_RP
WI.EndLeft, 1, 3
*Kinematic Coupling, ref node=WP_RIGHT_RP
WI.EndRight, 1, 3
*Node
9999994, 0.0, 0.0, 207.000000
*Nset, nset=SP_RP
9999994,
*Kinematic Coupling, ref node=FRAME_RP
BPR.BP_REF, 1, 6
*Kinematic Coupling, ref node=SP_RP
SPR.SP_REF, 1, 6
** Equations replaced by direct BC on belt node
*Surface, type=ELEMENT, name=WP_ALL_SURF
WI.WI_AllElems2,

** Spring removed ¡ª using connector approach instead
*End Assembly
**
** SURFACE INTERACTIONS
*Surface Interaction, name=INT_BW
*Friction
0.45,
*Surface Behavior, pressure-overclosure=HARD
*Surface Interaction, name=INT_PULLEY
*Friction
0.0,
*Surface Behavior, pressure-overclosure=HARD
** CONTACT DEFINITIONS
*Contact
*Contact Inclusions
WP_ALL_SURF, BI.BELT_OUTER
BI.BELT_INNER, BPR.BP_SURF
BI.BELT_INNER, SPR.SP_SURF
*Contact Property Assignment
WP_ALL_SURF, BI.BELT_OUTER,  INT_BW
BI.BELT_INNER, BPR.BP_SURF,   INT_PULLEY
BI.BELT_INNER, SPR.SP_SURF,   INT_PULLEY
** INITIAL CONDITIONS
*Initial Conditions, type=STRESS
BI.BI_ALL, 3.0000
**
** STEP 1: Pretension release (90.0N) + Frame pose (theta=11.848deg)
** Automatic stabilization suppresses belt rigid-body modes
**
*Step, name=Pretension, nlgeom=YES, inc=200
*Static, stabilize=1e-6
0.001, 1.0, 1e-10, 1.0
*Boundary
FRAME_RP, 1, 3, 0.0
FRAME_RP, 5, 6, 0.0
FRAME_RP, 4, 4, 0.20678454
SP_RP, 1, 6, 0.0
BI.234, 2, 2, 0.0

WP_LEFT_RP, 1, 3, 0.0
WP_LEFT_RP, 4, 6, 0.0
WP_RIGHT_RP, 1, 3, 0.0
WP_RIGHT_RP, 4, 6, 0.0
*Output, field
*Node Output
U, RF
*Element Output
S, PEEQ
*Contact Output
CSTRESS, CSTATUS, CFORCE, CDISP
*Output, history
*Energy Output
ALLSE, ALLSD, ALLWK
*End Step
**
** STEP 2: Friction ramp (mu=0.45) with reduced stabilization
**
*Step, name=ContactApproach, nlgeom=YES, inc=500
*Static, stabilize=1e-6
0.001, 1.0, 1e-10, 1.0
*Boundary, op=NEW
FRAME_RP, 1, 3, 0.0
FRAME_RP, 5, 6, 0.0
FRAME_RP, 4, 4, 0.20678454
SP_RP, 1, 6, 0.0
WP_LEFT_RP, 1, 3, 0.0
WP_LEFT_RP, 4, 6, 0.0
WP_RIGHT_RP, 1, 2, 0.0
WP_RIGHT_RP, 4, 6, 0.0
WP_RIGHT_RP, 3, 3, 0.2
BI.234, 2, 2, 0.0
*Output, field
*Node Output
U, RF
*Element Output
S, PEEQ
*Contact Output
CSTRESS, CSTATUS, CFORCE, CDISP
*Output, history
*Energy Output
ALLSE, ALLSD, ALLWK
*End Step
