*Heading
** V9 Polishing Assembly with True Cylinder + Two-pulley Belt + Frame Chain
** BigR=31.5 SmallR=12.0 C=207.0 BeltW=30.0
** Generated: 2026-07-23
** ========================================
** MATERIALS
** ========================================
*Material, name=AISI_304
*Density
 7.9e-9,
*Elastic
 200000., 0.30
*Plastic
 230., 0
 270., 0.002
 320., 0.01
 390., 0.03
 470., 0.07
 550., 0.15
 630., 0.25
 700., 0.4
*Material, name=BeltMat
*Density
 1.5e-9,
*Elastic
 4000., 0.30
*Material, name=RigidMat
*Elastic
 1e9, 0.30
** ========================================
** PART: Workpiece
** ========================================
*Part, name=WP
*Node
1, 0.000000, 0.500000, 0.000000
2, 0.000000, 1.541667, 0.000000
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*Element, Type=C3D8R
1, 1,2,15,14,638,639,652,651
2, 2,3,16,15,639,640,653,652
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*Solid Section, Elset=WPElems, Material=AISI_304
,
*Elset, Elset=WPElems
1,2,3,4,5,6
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*Nset, Nset=WPNodes
1,2,3,4,5,6
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*Nset, Nset=WP_EndLeft
1,2,3,4,5,6
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*Nset, Nset=WP_EndRight
30577,30578,30579,30580,30581,30582
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*Nset, Nset=WP_OuterSurface
13,26,39,52,65,78
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*Nset, Nset=WP_ContactSurface
5746,5759,5772,5785,5798,5811
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*Surface, type=ELEMENT, name=WP_Surf
WP_Surf_S4,
*End Part
** ========================================
** PART: Belt (Two-pulley path)
** ========================================
*Part, name=Belt
*Node
100001, -15.000000, 34.467391, 31.359920
100002, -9.000000, 34.467391, 31.359920
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*Element, Type=S4R
100001, 100001,100007,100008,100002
100002, 100002,100008,100009,100003
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*Shell Section, Elset=BeltElems, Material=BeltMat
1.0, 5
*Elset, Elset=BeltElems
100001,100002,100003,100004,100005,100006
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*Nset, Nset=BeltNodes
100001,100002,100003,100004,100005,100006
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*Surface, type=ELEMENT, name=Belt_Surf
Belt_Surf_SPOS, SPOS
*End Part
** ========================================
** ASSEMBLY
** ========================================
*Assembly, name=Assembly
*Instance, name=WP1, part=WP
*End Instance
*Instance, name=Belt1, part=Belt
*End Instance
*Node, NSET=FRAME_RP
1000001, 80.000000, 31.500000, 0.000000
*Node, NSET=SMALL_PULLEY_RP
1000002, 80.000000, 12.000000, -206.079475
*Node, NSET=TENSIONER_RP
1000003, 80.000000, 17.000000, -206.079475
*Node, NSET=WP_RP_Left
1000010, 0., 0., 0.
*Node, NSET=WP_RP_Right
1000011, 160.000000, 0., 0.
** Frame kinematic chain: Big pulley rigid body
*Rigid Body, ref node=FRAME_RP, analytical surface
*Rigid Body, ref node=SMALL_PULLEY_RP, analytical surface
*End Assembly
** ========================================
** CONTACT
** ========================================
*Surface Interaction, name=IntProp1
*Surface Behavior, pressure-overclosure=HARD
*Friction
 0.45,
*Surface Interaction, name=IntProp2
*Surface Behavior, pressure-overclosure=HARD
*Friction
 0.35,
*Contact
*Contact Inclusions
WP1.WP_Surf, Belt1.Belt_Surf
*Contact Property Assignment
WP1.WP_Surf, Belt1.Belt_Surf, IntProp1
** ========================================
** BOUNDARY CONDITIONS
** ========================================
** WP left end ¡ª distributing coupling to RP_Left
*Coupling, constraint name=CoupLeft, ref node=WP_RP_Left, surface=WP1.WP_EndLeft_Surf
*Kinematic
*Boundary
WP_RP_Left, 1,6, 0.
** WP right end
*Coupling, constraint name=CoupRight, ref node=WP_RP_Right, surface=WP1.WP_EndRight_Surf
*Kinematic
*Boundary
WP_RP_Right, 2,3, 0.
** Frame rotation about X axis at FRAME_RP
*Boundary
FRAME_RP, 1,3, 0.
FRAME_RP, 5,6, 0.
** ========================================
** STEPS
** ========================================
*Step, name=Pretension, nlgeom=NO
*Static
 0.01, 1.0, 1e-5, 0.1
*Boundary
TENSIONER_RP, 2, 2, -0.4
*Output, field
*Node Output
 U, RF
*Element Output
 S, PEEQ
*Contact Output
 CSTATUS, CPRESS
*End Step
*Step, name=FrameEngage, nlgeom=YES
*Static
 0.01, 1.0, 1e-5, 0.1
*Boundary, op=NEW
FRAME_RP, 1,3, 0.
FRAME_RP, 5,6, 0.
WP_RP_Left, 1,6, 0.
WP_RP_Right, 2,3, 0.
FRAME_RP, 4, 4, 0.206785
*Output, field
*Node Output
 U, RF
*Element Output
 S, PEEQ
*Contact Output
 CSTATUS, CPRESS, CNORMF
*End Step
*Step, name=Equilibrium, nlgeom=YES
*Static, stabilize
 0.1, 1.0, 1e-6, 1.0
*Output, field
*Node Output
 U, RF
*Element Output
 S, PEEQ
*Contact Output
 CSTATUS, CPRESS, CNORMF
*End Step
