*Heading
** V9 Fix: ENCASTRE WP + BELTMID closure=1.0mm V7-compatible BC
*Preprint, echo=NO, model=NO, history=NO, contact=NO
*Material, name=AISI_304
*Density
7.9e-09,
*Elastic
200000.0,0.30
*Plastic
230.0,0.000000
270.0,0.002000
320.0,0.010000
390.0,0.030000
470.0,0.070000
550.0,0.150000
630.0,0.250000
700.0,0.400000
*Material, name=BeltMat
*Density
1.5e-09,
*Elastic
4000.0,0.30
*Part, name=Belt
*Node
1,-15.00000,-100.00000,0.0
2,-11.25000,-100.00000,0.0
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*Element, type=S4R, ELSET=EALL
1,1,2,11,10
2,2,3,12,11
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*Nset, nset=LEFT
1,2,3,4,5,6,7,8,9,
*Nset, nset=RIGHT
451,452,453,454,455,456,457,458,459,
*Nset, nset=BELTMID, generate
10,441,1
*Shell Section, elset=EALL, material=BeltMat
1.0,
*End Part
*Part, name=WP
*Node
1459,0.00000,0.50000,14.50000
1460,0.00000,2.06250,14.50000
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*Element, type=C3D8R, ELSET=WPALL
200000,1459,1460,1469,1468,1792,1793,1802,1801
200001,1460,1461,1470,1469,1793,1794,1803,1802
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*Nset, nset=WZ0
1459,1460,1461,1462,1463,1464
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*Nset, nset=WZL
12115,12116,12117,12118,12119,12120
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*Solid Section, elset=WPALL, material=AISI_304
,
*End Part
*Assembly, name=Assembly
*Instance, name=BI, part=Belt
*End Instance
*Instance, name=WI, part=WP
*End Instance
*End Assembly
*Surface Interaction, name=GenProp
*Friction
0.45,
*Surface Behavior, pressure-overclosure=HARD
,
*Contact
*Contact Inclusions, ALL EXTERIOR
*Contact Property Assignment
,,GenProp
*Step, name=Pretension, nlgeom=YES, inc=2000, unsymm=YES
*Static, stabilize=0.0001
0.01,1.0,1e-08,0.1
*Boundary
BI.LEFT,1,3,0.
BI.LEFT,4,6,0.
BI.RIGHT,1,1,0.41
BI.RIGHT,2,3,0.
BI.RIGHT,4,6,0.
WI.WZ0,ENCASTRE
WI.WZL,ENCASTRE
*Output, field
*Node Output
U,RF
*Element Output
S
*Contact Output
CSTRESS,CSTATUS,CNORMF
*End Step
*Step, name=Closure, nlgeom=YES, inc=2000, unsymm=YES
*Static, stabilize=0.0001
0.01,1.0,1e-08,0.1
*Boundary, op=NEW
BI.LEFT,1,3,0.
BI.LEFT,4,6,0.
BI.RIGHT,1,1,0.41
BI.RIGHT,2,3,0.
BI.RIGHT,4,6,0.
BI.BELTMID,3,3,1.0000
WI.WZ0,ENCASTRE
WI.WZL,ENCASTRE
*Output, field
*Node Output
U,RF
*Element Output
S,SF,PEEQ
*Contact Output
CSTRESS,CSTATUS,CNORMF
*End Step
*Step, name=Equilibrium, nlgeom=YES, inc=2000, unsymm=YES
*Static, stabilize=0.00005
0.01,1.0,1e-08,0.1
*Boundary, op=NEW
BI.LEFT,1,3,0.
BI.LEFT,4,6,0.
BI.RIGHT,1,1,0.41
BI.RIGHT,2,3,0.
BI.RIGHT,4,6,0.
BI.BELTMID,3,3,1.0000
WI.WZ0,ENCASTRE
WI.WZL,ENCASTRE
*Output, field
*Node Output
U,RF
*Element Output
S,SF,PEEQ
*Contact Output
CSTRESS,CNORMF,CSTATUS
*End Step
