*Heading
** V9 Frame-Driven Contact: rough, x2=42.5mm, theta=11.8479deg
** True Cylinder O-grid WP + Curved Belt S4R shell
*Preprint, echo=NO, model=NO, history=NO, contact=NO
*Material, name=AISI_304
*Density
 7.9e-09,
*Elastic
 200000.0, 0.30
*Plastic
  230.0, 0.000000
  270.0, 0.002000
  320.0, 0.010000
  390.0, 0.030000
  470.0, 0.070000
  550.0, 0.150000
  630.0, 0.250000
  700.0, 0.400000
*Material, name=BeltMat
*Density
 1.5e-09,
*Elastic
 4000.0, 0.30
*Part, name=Belt
*Node
  1, -15.00000, 49.56766, 25.80329
  2, -11.25000, 49.56766, 25.80329
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*Element, type=S4R, ELSET=EALL
  1, 1, 2, 11, 10
  2, 2, 3, 12, 11
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*Nset, nset=BLEFT
  1,
  2,
  3,
  4,
  5,
  6,
  7,
  8,
  9,
*Nset, nset=BRIGHT
  217,
  218,
  219,
  220,
  221,
  222,
  223,
  224,
  225,
*Shell Section, elset=EALL, material=BeltMat
  1.0,
*End Part
*Part, name=WP
*Node
  1225, 0.00000, 0.50000, 0.00000
  1226, 0.00000, 2.06250, 0.00000
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*Element, type=C3D8R, ELSET=WPALL
  200000, 1225, 1226, 1235, 1234, 1558, 1559, 1568, 1567
  200001, 1226, 1227, 1236, 1235, 1559, 1560, 1569, 1568
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*Nset, nset=WX0
  1225,
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*Nset, nset=WXL
  11881,
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*Solid Section, elset=WPALL, material=AISI_304
,
*End Part
*Assembly, name=Assembly
*Instance, name=BI, part=Belt
*End Instance
*Instance, name=WI, part=WP
*End Instance
*End Assembly
*Surface Interaction, name=GenProp
*Friction
  0.45,
*Surface Behavior, pressure-overclosure=HARD
,
*Contact
*Contact Inclusions, ALL EXTERIOR
*Contact Property Assignment
  ,  , GenProp
*Step, name=Pretension, nlgeom=YES, inc=2000, unsymm=YES
*Static, stabilize=0.0001
  0.01, 1.0, 1e-08, 0.1
*Boundary
  BI.BLEFT, 1, 3, 0.0
  BI.BLEFT, 4, 6, 0.0
  BI.BRIGHT, 2, 2, 0.41
  BI.BRIGHT, 1, 1, 0.0
  BI.BRIGHT, 3, 3, 0.0
  BI.BRIGHT, 4, 6, 0.0
  WI.WX0, 1, 3, 0.0
  WI.WXL, 1, 3, 0.0
*Output, field, frequency=1
*Node Output
  U, RF
*Element Output
  S, SF
*Contact Output
  CSTRESS, CSTATUS
*End Step
*Step, name=FrameEngage, nlgeom=YES, inc=2000, unsymm=YES
*Static, stabilize=0.0001
  0.01, 1.0, 1e-08, 0.1
*Boundary, op=NEW
  BI.BLEFT, 1, 3, 0.0
  BI.BLEFT, 4, 6, 0.0
  BI.BRIGHT, 2, 2, 0.41
  BI.BRIGHT, 1, 1, 0.0
  BI.BRIGHT, 3, 3, -42.500000
  BI.BRIGHT, 4, 6, 0.0
  WI.WX0, 1, 3, 0.0
  WI.WXL, 1, 2, 0.0
*Output, field, frequency=1
*Node Output
  U, RF
*Element Output
  S, SF, PEEQ
*Contact Output
  CSTRESS, CSTATUS
*End Step
*Step, name=Equilibrium, nlgeom=YES, inc=2000, unsymm=YES
*Static, stabilize=0.0001
  0.1, 1.0, 1e-08, 0.5
*Output, field, frequency=1
*Node Output
  U, RF
*Element Output
  S, SF, PEEQ
*Contact Output
  CSTRESS, CSTATUS
*End Step
